# Hohlbodensystem Typ FLOOR and more®

Dataset: ILCD process, EPD, average dataset
Geography: DE
Reference year: 2017
Valid until: 2022
Classification: OEKOBAU.DAT: Komposite / Systembauteile / Decken
Classification: IBUCategories: 02 Bauprodukte / Systemböden / Systemböden
Method details: Systemböden.pdf
Registration number: EPD-LIN-20170194-IBD1-DE
Owner: Lindner Group
Compliance: DIN EN 15804; ISO 14025
Review: Accredited third party review by Institut Bauen und Umwelt e. V.
Amounts: rows without a unit in brackets have none in this file; such an amount is in the reference unit of its flow, which a separate flow dataset defines
copyright: true

## General comment
Das Lindner Trockenhohlbodensystem Typ FLOOR and more® ist ein Hohlboden mit geschlossener Tragschicht, geeignet zur Applikation von Bodenbelägen, der auf einer speziellen Unterkonstruktion gelagert wird, um einen Hohlraum zwischen Tragschicht und der Rohdecke zur Installation für die Unterbringung aller Installationen sowie Ver- und Entsorgungsleitungen zu bilden. Der Zugang zum Hohlraum wird bei Hohlböden z. B. durch Revisionsöffnungen oder Doppelbodentrassen realisiert.

Das Hohlbodensystem wird im Wesentlichen von der Hohlbodenplatte und der Unterkonstruktion gebildet.

Für die Montage werden ergänzende Komponenten (Montageklebstoff zur Plattenverklebung, Rohbodenversiegelung, Stützenkleber, Gewindeversiegelung, Kantenversiegelung und Anschlusselemente für unterschiedliche Systembodenkonstruktionen) benötigt.

Die Hohlbodenplatten, Typ FLOOR and more®,

werden aus Gipsfaserplatten hergestellt (Dichte von ca. 1.300 – 1.530 kg/m³ und Plattendicken von 24 – 40 mm). Hohlbodenplatten werden standardmäßig in den Abmessungen 600 x 600 mm gefertigt.

Als Unterkonstruktion werden Stahlstützen verwendet, die unterschiedliche Konstruktionshöhen (40 – 2.000 mm) ermöglichen.

Die EPD Ergebnisse für die Herstellung des Hohlbodensystems Typ FLOOR and more® gelten für Hohlbodenplatten mit einer Dicke zwischen 24 mm und 40 mm. Diese unterschiedlichen Plattentypen sind mit verschiedenen Stützen kombinierbar.

Die Herstellungsprozesse unterscheiden sich dabei nicht.

Für die Verwendung des Produkts gelten die jeweiligen nationalen Bestimmungen, am Ort der Verwendung, in Deutschland zum Beispiel die /Bauordnungen der Länder/ und die technischen Bestimmungen auf Grund dieser Vorschriften.

Oberbeläge werden für die Ökobilanzierung nicht betrachtet, da die Möglichkeiten an Oberbelägen sehr vielfältig sind. Dies kann entweder Stein, Parkett, Teppich usw. sein. Eine Betrachtung wäre nicht aussagekräftig für das FLOOR and more®-System.

## Technology and included processes
Herstellung und Verarbeitung der Gipsfaserplatte: Die wesentlichen Rohstoffe Alpha-Halbhydrat, Beta-Gips und Zellulosefasern werden gemischt und nach Zugabe von Wasser unter hohem Druck zu stabilen Platten gepresst, getrocknet sowie anschließend auf die benötigten Formate geschnitten. In weiteren Fertigungsschritten wird an den Platten seitlich eine Verzahnung angefräst. Herstellung der Stützen: Durch Widerstandsschweißen oder Vertaumeln der einzelnen Komponenten Rohre, Gewindestangen und Stahlblech werden die Stützen hergestellt. Durch Galvanotechnik (galvanische Verzinkung) werden die Stützen mit einer Zinkschicht versehen, um sie vor Korrosion zu schützen. Die Lindner Group verfügt über ein Qualitätsmanagementsystem nach /EN ISO 9001/.
Deklarierte Einheit:
Die deklarierte Einheit bezieht sich auf 1 m² Hohlboden FLOOR and more® ohne Bodenbelag mit einer durchschnittlichen Plattendicke von 36,46 mm und der durchschnittlichen Dichte von 1.304 kg/m³. Für die Montage der Bodenplatte werden 4 Stützen pro m² benötigt.

Innerhalb der Produktfamilie variiert die Plattendicke von 24 – 40 mm und die Rohdichte von 1.300 – 1.530 kg/m³.

Die deklarierte Einheit hat ein Gewicht für die Platte von 47,6 kg/m² zzgl. 0,805 kg für die dazugehörigen Stützen (0,2014 kg je Stütze). Gesamtgewicht des Hohlbodensystems ist 48,4 kg.

Für die Stahlstützen werden die meistverwendeten, üblichen Stützen deklariert: Typ L1, 120 mm, Stückgewicht 0,2014 kg/St.

Alternativ ist es möglich die Platte mit Stützen für Konstruktionshöhen zwischen 40 und 2.000 mm zu kombinieren.
Der Oberbelag wird für die Ökobilanzierung nicht
betrachtet, da die Möglichkeiten an Belägen sehr
vielfältig sind. Dies kann entweder Parkett, Linoleum,
Teppich usw. sein

## Technical purpose
Das unter 2.1 genannte Hohlbodensystem aus Gips-faserplatten, Stützen und ergänzenden Komponenten wird hauptsächlich in öffentlichen, gewerblichen und privat genutzten Gebäuden zur Herstellung von Hohl-/Installationsräumen eingesetzt. Das Hohlboden-system kann mit allen üblichen Bodenbelägen belegt werden, muss jedoch auf die verschiedenen Systemvarianten abgestimmt werden.

## Reference product
- 1 m² Hohlbodensystem Typ FLOOR and more®: 1

## Inputs
- Erneuerbare Primärenergie als Energieträger (PERE) [MJ]: A1-A3 201, A4 1.13, A5 0.0402, B1 0, B2 0
- Erneuerbare Primärenergie zur stofflichen Nutzung (PERM) [MJ]: A1-A3 0, A4 0, A5 0, B1 0, B2 0
- Total erneuerbare Primärenergie (PERT) [MJ]: A1-A3 201, A4 1.13, A5 0.0402, B1 0, B2 0
- Nicht-erneuerbare Primärenergie als Energieträger (PENRE) [MJ]: A1-A3 297.983, A4 17.1, A5 0.269, B1 0, B2 0
- Nicht-erneuerbare Primärenergie zur stofflichen Nutzung (PENRM) [MJ]: A1-A3 0, A4 0, A5 0, B1 0, B2 0
- Total nicht erneuerbare Primärenergie (PENRT) [MJ]: A1-A3 298, A4 17.1, A5 0.269, B1 0, B2 0
- Einsatz von Sekundärstoffen (SM) [kg]: A1-A3 8.97, A4 0, A5 0, B1 0, B2 0
- Erneuerbare Sekundärbrennstoffe (RSF) [MJ]: A1-A3 0, A4 0, A5 0, B1 0, B2 0
- Nicht erneuerbare Sekundärbrennstoffe (NRSF) [MJ]: A1-A3 0, A4 0, A5 0, B1 0, B2 0
- Einsatz von Süßwasserressourcen (FW) [m^3]: A1-A3 0.114, A4 0.00131, A5 0.00306, B1 0, B2 0

## Outputs
- Gefährlicher Abfall zur Deponie (HWD) [kg]: A1-A3 3.15e-6, A4 1.08e-6, A5 1.6e-10, B1 0, B2 0
- Entsorgter nicht gefährlicher Abfall (NHWD) [kg]: A1-A3 2.62, A4 0.00125, A5 0.003, B1 0, B2 0
- Entsorgter radioaktiver Abfall (RWD) [kg]: A1-A3 0.00974, A4 1.96e-5, A5 1.73e-5, B1 0, B2 0
- Komponenten für die Wiederverwendung (CRU) [kg]: A1-A3 0, A4 0, A5 0, B1 0, B2 0
- Stoffe zum Recycling (MFR) [kg]: A1-A3 1.1202, A4 0, A5 0.228, B1 0, B2 0
- Stoffe für die Energierückgewinnung (MER) [kg]: A1-A3 0, A4 0, A5 0, B1 0, B2 0
- Exportierte elektrische Energie (EEE) [MJ]: A1-A3 0, A4 0, A5 3.66, B1 0, B2 0
- Exportierte thermische Energie (EET) [MJ]: A1-A3 0, A4 0, A5 1.57, B1 0, B2 0

## Impact indicators
- Globales Erwärmungspotenzial (GWP) [kg CO_(2)-Äq.]: A1-A3 13.2, A4 1.26, A5 1.26, B1 0, B2 0
- Abbau Potential der stratosphärischen Ozonschicht (ODP) [kg CFC11-Äq.]: A1-A3 1.82e-10, A4 1.59e-13, A5 2.74e-13, B1 0, B2 0
- Versauerungspotenzial von Boden und Wasser (AP) [kg SO_(2)-Äq.]: A1-A3 0.0313, A4 0.00277, A5 0.000127, B1 0, B2 0
- Eutrophierungspotenzial (EP) [kg PO_(4)^(3)-Äq.]: A1-A3 0.00578, A4 0.000651, A5 2.59e-5, B1 0, B2 0
- Bildungspotential für troposphärisches Ozon (POCP) [kg Ethen-Äq.]: A1-A3 0.00253, A4 -0.00089, A5 1.02e-5, B1 0, B2 0
- Potenzial für den abiotischen Abbau nicht fossiler Ressourcen (ADPE) [kg Sb-Äq.]: A1-A3 0.000633, A4 1.31e-7, A5 1.17e-8, B1 0, B2 0
- Potenzial für den abiotischen Abbau fossiler Brennstoffe (ADPF) [MJ]: A1-A3 274, A4 17, A5 0.226, B1 0, B2 0

## Use advice
Gültigkeitsbereich:
Die EPD bezieht sich auf das Hohlbodensystem Typ FLOOR and more®.
Die gesammelten Produktionsdaten beziehen sich auf das Jahr 2016. Die Herstellung der Hohlbodenplatte erfolgt im Lindner Werk in Dettelbach, die Unterkonstruktion wird in Arnstorf hergestellt.
Systemgrenze:
Die Lebenszyklusanalyse für Hohlboden FLOOR and more® umfasst die Lebenswegabschnitte „von der Wiege bis Werkstor mit Optionen“ (cradle to gate with options).
Berücksichtigt werden die Module A1-A3 als zusammengefasstes Modul für die Herstellungsphase, A4-A5 (Errichtungsphase) und B1-B2 (Nutzung und Instandhaltung).

Im Einzelnen wurden folgende Prozesse in das Informationsmodul A1-A3 der Herstellung des Hohlbodensystems, Typ FLOOR and more®, einbezogen:

- Bereitstellungsprozesse von Rohmaterial (Gips, Zellulose, Stahl – Modul A1)

- Transporte der Roh- und Hilfs- und Betriebsstoffe zum Werk (A2)

- Herstellungsprozesse für das Systemprodukt im Werk, inkl. der energetischen Aufwendungen (Strom, thermische Energie und Entsorgung von anfallenden Reststoffen (A3)

- Herstellung von Verpackungsmaterialien (A3)

- Transport vom Werkstor bis zur Baustelle (A4) - Entsorgung der Verpackungsmaterialien (A5)
- Nutzung des Hohlbodens (B1) und dessen Instandhaltung (B2).

Für die Nutzungsphase (B1- B2) werden die Module
mit 0 deklariert. Das Produkt verursacht während der
Nutzungsphase keine Umweltlasten.
Das Produkt selbst bedarf keiner Wartung.

## Data sources
- Hohlbodensystem Typ FLOOR and more® .pdf
- GaBi Database (all versions)
- GaBi database SP29 2016
