# Balkenschichtholz Nadelholz (generisch); 515 kg/m3 density at 12% moisture

Dataset: ILCD process, EPD, generic dataset
Geography: DE
Reference year: 2018
Valid until: 2022
Classification: oekobau.dat: Holz / Vollholz / Balkenschichtholz (Duo-Triobalken)
Owner: thinkstep
Compliance: DIN EN 15804
Review: Dependent internal review by thinkstep, IABP-GaBi, IBP-GaBi; Independent external review by GaBi user forum, GaBi bug forum, GaBi user community
Amounts: rows without a unit in brackets have none in this file; such an amount is in the reference unit of its flow, which a separate flow dataset defines
copyright: true

## General comment
Dieser Datensatz wurde nach dem European Standard EN 15804 für Nachhaltiges Bauen modelliert. Ergebnisse werden in Modulen abgebildet, die den strukturierten Ausdruck von Ergebnissen über den gesamten Lebenszyklus zulassen.

## Geography
Der Datensatz bildet die länderspezifische Situation in Deutschland ab. Dabei werden Haupttechnologien, spezifische regionale Charakteristiken und ggf. Importstatistiken berücksichtigt.

## Time period
Jährlicher Durchschnitt

## Technology and included processes
Balkenschichtholz (andere Bezeichnung: Duo-/Triobalken) besteht aus verklebten Platten, die auch als Lamellen bezeichnet werden. Balkenschichtholz weist im Vergleich zu Brettschichtholz eine größere Lamellendicke auf (45mm) und benötigt deshalb weniger Leim (PU- oder Phenolharz-basierte Klebesysteme) pro m3. Die Lamellen werden derart verklebt, dass die Fasern parallel verlaufen, so dass größere Träger produziert werden können. Die Prozessschritte für die Produktion entsprechen denen von Brettschichtholz und gliedern sich wie folgt:
1. Transport der Fichtenhölzer zum Produktionsort und Lagerung
2. Trocknung
3. Vorschneiden
4. Keilzinkung
5. Schneiden der Lamellen
6. Verklebung
7. Endbearbeitung

Hintergrundsystem:
Strom: Die Stromerzeugung wird entsprechend der länderspezifischen Randbedingungen modelliert. Die landesspezifische Analyse beinhaltet:
1.: Spezifische Kraftwerke der verschiedenen fossilen Energieträger und der Einsatz erneuerbarer Energien sind entsprechend der länderspezifischen Energieträgermixe modelliert. Die Analyse bezieht Stromimporte aus den Nachbarländern, Transmissions-und Verteilungsverluste und den Eigenverbrauch im Kraftwerk und bei der Verteilung bzw. Speicherung, z. B. durch Pumpspeicherwerke, ein.
2.: Die landes-/regionalspezifischen Technologiestandards sowie die Erzeugung in Elektrizitätskraftwerken und/oder in speziellen Kraftwerken mit Kraft-Wärme-Kopplung (KWK) sind berücksichtigt.
3.: Die länderspezifische Energieträgerbereitstellung (mit Anteil der Importe und/oder Eigenversorgung) einschließlich der Energieträger-Eigenschaften (z. B. Elementar- und Energiegehalte) werden berücksichtigt.
4.: Die Förderung, Produktion, Verarbeitung und Transportprozesse werden entsprechend der Situation im jeweiligen Stromerzeugerland modelliert. Die unterschiedlichen Produktions- und Verarbeitungsverfahren (Emissionen und Wirkungsgrade) in den verschiedenen Energieerzeugerländern werden einbezogen, z. B. Rohöl-Veredelungsverfahren oder Abfackel-Raten an den Ölplattformen.
Thermische Energie, Prozessdampf: Die Erzeugung von Dampf und thermischer Energie in Heizkraftwerken wird entsprechend der landesspezifischen Situation (Emissionsgrenzwerte, Energieträgerbasis) modelliert.
Der Wirkungsgrad für die thermische Energieerzeugung beträgt per Definition 100% des Energieträgereinsatzes. Für Prozessdampf liegt der Wirkungsgrad im Bereich von 85-95%. Die zur Heizenergie-Erzeugung verwendeten Energieträger werden entsprechend der nationalen Situation modelliert (siehe Kapitel Strom oben).
Transporte: Alle relevanten und bekannten Transportprozesse in Form von See- und Binnenschiffsverkehr sowie Bahn-, Lkw- und der Leitungstransport sind enthalten.
Energieträger: Die Energieträger werden entsprechend der spezifischen Versorgungslage modelliert (siehe Kapitel Strom oben).
Raffinerieprodukte: Diesel, Benzin, technische Gase, Heizöl, Schmierstoffe und Rückstände, wie Bitumen, werden mit einem parametrierten länderspezifische Raffineriemodell modelliert. Das Raffinerie-Modell bezieht die länderspezifischen Veredelungsverfahren (z. B. Emissionspegel, interner Energieverbrauch etc.) und das länderspezifische Produktspektrum ein, das sich je nach Land stark unterscheiden kann. Die Rohöl-Förderung wird gemäß der länderspezifischen Situation mit den jeweiligen Energieträger-Eigenschaften modelliert.

## Technical purpose
Dieses Produkt kann im Baubereich verwendet werden.

## Safety margin
10 %. Produktsystem weitgehend vollständig abgebildet. Gute technologische, zeitliche und geographische Repräsentativität.

## Reference product
- Balkenschichtholz Nadelholz m3: 1

## Inputs
- Erneuerbare Primärenergie als Energieträger (PERE) [MJ]: A1-A3 1570.48, C1 0, C2 1.02876, C3 10887.3, D -1378.59
- Erneuerbare Primärenergie zur stofflichen Nutzung (PERM) [MJ]: A1-A3 10881, C1 0, C2 0, C3 -10881, D 0
- Total erneuerbare Primärenergie (PERT) [MJ]: A1-A3 12451.5, C1 0, C2 1.02876, C3 6.2262, D -1378.59
- Nicht-erneuerbare Primärenergie als Energieträger (PENRE) [MJ]: A1-A3 3388.96, C1 0, C2 17.6715, C3 10.8254, D -4815.96
- Nicht-erneuerbare Primärenergie zur stofflichen Nutzung (PENRM) [MJ]: A1-A3 0, C1 0, C2 0, C3 0, D 0
- Total nicht erneuerbare Primärenergie (PENRT) [MJ]: A1-A3 3388.96, C1 0, C2 17.6715, C3 10.8254, D -4815.96
- Einsatz von Sekundärstoffen (SM) [kg]: A1-A3 0, C1 0, C2 0, C3 0, D 0
- Erneuerbare Sekundärbrennstoffe (RSF) [MJ]: A1-A3 0, C1 0, C2 0, C3 0, D 0
- Nicht erneuerbare Sekundärbrennstoffe (NRSF) [MJ]: A1-A3 0, C1 0, C2 0, C3 0, D 0
- Einsatz von Süßwasserressourcen (FW) [m3]: A1-A3 0.718019, C1 0, C2 0.000921345, C3 0.0033707, D 1.59392

## Outputs
- Gefährlicher Abfall zur Deponie (HWD) [kg]: A1-A3 3.3914e-5, C1 0, C2 6.60365e-7, C3 7.28019e-9, D -2.47731e-6
- Entsorgter nicht gefährlicher Abfall (NHWD) [kg]: A1-A3 1.95248, C1 0, C2 0.00310166, C3 0.00833163, D 4.03427
- Entsorgter radioaktiver Abfall (RWD) [kg]: A1-A3 0.155278, C1 0, C2 1.86045e-5, C3 0.000904881, D -0.165394
- Komponenten für die Wiederverwendung (CRU) [kg]: A1-A3 0, C1 0, C2 0, C3 0, D 0
- Stoffe zum Recycling (MFR) [kg]: A1-A3 0, C1 0, C2 0, C3 0, D 0
- Stoffe für die Energierückgewinnung (MER) [kg]: A1-A3 0, C1 566.5, C2 0, C3 0, D 0
- Exportierte elektrische Energie (EEE) [MJ]: A1-A3 0, C1 0, C2 0, C3 0, D 1139.61
- Exportierte thermische Energie (EET) [MJ]: A1-A3 0, C1 0, C2 0, C3 0, D 2671.75

## Impact indicators
- Globales Erwärmungspotenzial (GWP) [kg CO2 Äquiv.]: A1-A3 -593.704, C1 0, C2 1.31478, C3 904.325, D -226.285
- Abbaupotenzial der stratosphärischen Ozonschicht (ODP) [kg R11 Äquiv.]: A1-A3 7.05358e-12, C1 0, C2 4.35198e-16, C3 3.55339e-14, D -7.61617e-12
- Versauerungspotential (AP) [kg SO2 Äquiv.]: A1-A3 0.70133, C1 0, C2 0.00265572, C3 0.0010171, D -0.180545
- Eutrophierungspotential (EP) [kg Phosphat Äquiv.]: A1-A3 0.15854, C1 0, C2 0.000631337, C3 0.000200888, D -0.0304087
- Bildungspotenzial für troposphärisches Ozon (POCP) [kg Ethen Äquiv.]: A1-A3 0.0569662, C1 0, C2 -0.000867983, C3 8.37503e-5, D -0.0220581
- Potenzial für den abiotischen Abbau nicht fossiler Ressourcen (ADPE) [kg Sb Äquiv.]: A1-A3 7.40374e-5, C1 0, C2 1.1064e-7, C3 3.32276e-7, D -8.19252e-5
- Potenzial für den abiotischen Abbau fossiler Brennstoffe (ADPF) [MJ]: A1-A3 2996.94, C1 0, C2 17.6239, C3 8.5414, D -4398.42

## Use advice
Der Datensatz repräsentiert ein Cradle to Gate Inventar. Er kann verwendet werden, um die Lieferkette des jeweiligen Produktes in einer repräsentativen Weise zu charakterisieren. Die Kombination mit einzelnen Einheitenprozessen und diesem Produkt ermöglicht die Erstellung von anwenderspezifischen (Produkt-) LCAs.

## Data sources
- GaBi Database Edition 2020, SP40
- GaBi database (all versions)
- Analyse und Bewertung der forstlichen Produktion
- ÖkoPot-Projektbericht, 2008
- NetLZ-Projektbericht "Grundsätze für Holz und Holzwerkstoffe", 2007
- Vergleichende Oekobilanzierung der Rundholzproduktion in verschiedenen Forstbetrieben BFH Report 204
- Ökologische Bilanzierung von Bauschnittholz und veredelten Vollholzprodukten, 2000
