# CALOSTAT®

Dataset: ILCD process, EPD, specific dataset
Geography: RER
Reference year: 2018
Valid until: 2023
Classification: OEKOBAU.DAT: Dämmstoffe / Siliziumdioxid-basiert / Hydrophobe Platten
Classification: IBUCategories: 02 Bauprodukte / Wärmedämmungsprodukte / Mineralische Dämmstoffe
Method details: Mineralische Dämmstoffe.pdf
Registration number: 9502
Owner: Evonik Resource Efficiency GmbH
Compliance: DIN EN 15804; ISO 14025
Review: Accredited third party review by Institut Bauen und Umwelt e. V.
Amounts: rows without a unit in brackets have none in this file; such an amount is in the reference unit of its flow, which a separate flow dataset defines
copyright: true

## General comment
CALOSTAT® ist ein Hochleistungsdämmmaterial auf Basis von synthetisch amorphem Siliciumdioxid. Chemisch gesehen entspricht dies Quarz in einer nicht-kristallinen Struktur.

Die vorliegende EPD beschreibt eine mineralische Dämmplatte für Bauanwendungen, wie z.B. Fassadenelemente, Betonfertigteile, Kerndämmung, Vormauerschalen und Bauelemente wie Türen und Fenster sowie zur Optimierung der technischen Gebäudeausrüstung.

CALOSTAT®-Platten sind selbsttragende Leichtbauelemente, deren wesentliche kennzeichnende Eigenschaften eine geringe Wärmeleitfähigkeit (0,02 W / (m*K)) in einem breiten Temperaturbereich, Nichtbrennbarkeit und chemische Beständigkeit sind. CALOSTAT® ist ein nichtbrennbares Material, das der Baustoffklasse A nach DIN 4102 zugeordnet wird. Definitionsgemäß gehört CALOSTAT® zu den Superisolationsmaterialien, denn es dämmt besser als ruhende Luft.

Der hier beschriebene Dämmstoff wird durch Pressen unter hohem Druck in Form von Platten hergestellt. Das Material ist grau und besitzt eine Rohdichte von 165 kg/m³.

CALOSTAT® ist ein im Kern wasserabweisender Dämmstoff, dennoch kann Wasserdampf durch das Material diffundieren, ohne dessen Struktur zu zerstören oder zu kondensieren.

Aufgrund seiner mineralischen Basis ist CALOSTAT® rezyklierbar sowie im Verhalten reaktionsneutral zu Verbundwerkstoffen.

Für das Inverkehrbringen des Produkts in der EU/EFTA (mit Ausnahme der Schweiz) gilt die Verordnung (EU) Nr. 305/2011 (CPR). Das Produkt benötigt eine Leistungserklärung unter Berücksichtigung der Europäischen Technischen Bewertung ETA Nr.16/0587: "CALOSTAT - Thermal insulation board made of microporous silica" und die CE-Kennzeichnung. Für die Verwendung gelten die jeweiligen nationalen Bestimmungen.

## Technology and included processes
Die Produktion von CALOSTAT® erfolgt gemäß DIN ISO 9001. Die Gütesicherung wird durch interne und externe Produkt- und Produktionskontrollen gemäß den Vorgaben der bauaufsichtlichen Zulassungen sichergestellt. Die Produktqualität wird durch die Übereinstimmungskennzeichnung für Bauprodukte und den daraus folgenden Überwachungsprotokollen wie auch Prüfzeugnissen dokumentiert.
Technische Daten:
Die bautechnischen Daten beziehen sich auf das Produkt CALOSTAT® gemäß ETA-16/0587.
Deklarierte Einheit:
Alle Angaben beziehen sich auf einen Kubikmeter CALOSTAT® bei einer Rohdichte von 165 kg/m3.

## Technical purpose
CALOSTAT® empfiehlt sich für unterschiedliche Einsatzbereiche innen und außen rund um die Gebäudehülle gemäß DIN 4108-10, zum Beispiel: Innendämmung von Decken, Dächern, Bodenplatten unter Estrich und Wänden (DI, DEO dg, WI); Außendämmung von Dach oder Decke unter Deckung oder Abdichtung und Wand hinter Bekleidung (DAD, DAA, WAB) sowie als Kerndämmung für zweischaliges Mauerwerk für Außenwände. Damit ist CALOSTAT® als Dämmung in allen Gebäudetypen von Wohn-, Industrie-, Büro- bis zu Verwaltungsgebäuden geeignet.

Fassade
CALOSTAT® ermöglicht eine besonders schlanke Fassadenbauweise. So können Fassaden unter Einhaltung der Grundstücksbegrenzung, der Abstandsflächen zur Nachbarbebauung oder auch unter Beibehaltung der vorhandenen Tragstrukturen neugebaut oder saniert werden. Relevante Fassadentypen sind hier z.B. Pfostenriegel-Fassaden, vorgehängte Elementfassaden oder Betonsandwichelemente. Im Falle eines Neubaus bewähren sich die effektive Dämmung mit CALOSTAT® und der daraus folgende schlanke Fassadenquerschnitt besonders bei dichter innerstädtischer Bebauung.

Mit dem Bemessungswert für die Wärmeleitfähigkeit von nur 0,02 W/(m*K) – gemäß ETA-16/0587 – kann im Vergleich zu konventionellen mineralischen Dämmstoffen der Wandaufbau um bis zu 50% verringert werden. Das wiederum erhöht die Gestaltungsmöglichkeiten der Planer und Architekten.

Weitere Vorteile sind, dass im Fassadenbau geringere Wandaufbauten geringere statische Lasten und geringeren Materialverbrauch bedeuten und sich im Fertigteilbau die Transportkapazitäten durch die dünneren Wandaufbauten erhöhen.

Massivbau
Im Neubau ist CALOSTAT® für die Kerndämmung in Dämmziegeln aber auch in Vormauerziegeln sowie im zweischaligen Mauerwerk oder als Kerndämmung in Beton- und Leichtbetonfertigteilen geeignet. Im Sanierungsfall können Häuser in Massivbauweise systemkonform gedämmt werden, ohne ihren Charakter zu verlieren.

Innendämmung

Als thermische Aufwertung einer Innendämmung, beispielsweise bei der Gebäudesanierung, ist CALOSTAT® in mineralischen Baustoffen z.B. aus Calciumsilikat, Ziegel oder Porenbeton möglich. CALOSTAT® wird dann in Form eines mineralischen Verbundwerkstoffs diffusionsoffen an die Wand gebracht. Damit entsteht eine sehr schlanke kapillaraktive Innendämmung, die in dieser Form bisher nicht möglich war.

Decken- und Bodendämmung
Als Dämmung bei Decken und Böden ermöglicht CALOSTAT® insbesondere bei der Sanierung im Gebäudebestand den Erhalt oder das Herstellen von barrierefreier Bauweise. Für Hohlraumböden erfüllt CALOSTAT® die hohen Ansprüche an den Brandschutz.

## Reference product
- CALOSTAT® (1 m³): 1

## Inputs
- Erneuerbare Primärenergie als Energieträger (PERE) [MJ]: A1-A3 9.88, A5 0, C2 0, C3 0, C4 0, D -9.88
- Erneuerbare Primärenergie zur stofflichen Nutzung (PERM) [MJ]: A1-A3 0, A5 0, C2 0, C3 0, C4 0, D 0
- Total erneuerbare Primärenergie (PERT) [MJ]: A1-A3 9.88, A5 0, C2 0, C3 0, C4 0, D -9.88
- Nicht-erneuerbare Primärenergie als Energieträger (PENRE) [MJ]: A1-A3 235, A5 -0.0495, C2 1.54, C3 0.0884, C4 0.947, D -152
- Nicht-erneuerbare Primärenergie zur stofflichen Nutzung (PENRM) [MJ]: A1-A3 0, A5 0, C2 0, C3 0, C4 0, D 0
- Total nicht erneuerbare Primärenergie (PENRT) [MJ]: A1-A3 235, A5 -0.0495, C2 1.54, C3 0.0884, C4 0.947, D -152
- Einsatz von Sekundärstoffen (SM) [kg]: A1-A3 0, A5 0, C2 0, C3 0, C4 0, D 159
- Erneuerbare Sekundärbrennstoffe (RSF) [MJ]: A1-A3 0, A5 0, C2 0, C3 0, C4 0, D 0
- Nicht erneuerbare Sekundärbrennstoffe (NRSF) [MJ]: A1-A3 0, A5 0, C2 0, C3 0, C4 0, D 0
- Einsatz von Süßwasserressourcen (FW) [m^3]: A1-A3 215, A5 0.000762, C2 0.00506, C3 0.000633, C4 0.00673, D -132

## Outputs
- Gefährlicher Abfall zur Deponie (HWD) [kg]: A1-A3 8.87e-6, A5 0, C2 4.15e-6, C3 1.62e-9, C4 6.06e-7, D -2.05e-6
- Entsorgter nicht gefährlicher Abfall (NHWD) [kg]: A1-A3 6.1, A5 -0.000221, C2 0.00483, C3 0.00219, C4 165, D -1.69
- Entsorgter radioaktiver Abfall (RWD) [kg]: A1-A3 1.01, A5 -0.000133, C2 7.82e-5, C3 0.00021, C4 0.00051, D -0.121
- Komponenten für die Wiederverwendung (CRU) [kg]: A1-A3 0, A5 0, C2 0, C3 0, C4 0, D 0
- Stoffe zum Recycling (MFR) [kg]: A1-A3 0, A5 0, C2 0, C3 159, C4 0, D 0
- Stoffe für die Energierückgewinnung (MER) [kg]: A1-A3 0, A5 0, C2 0, C3 0, C4 0, D 0
- Exportierte elektrische Energie (EEE) [MJ]: A1-A3 0, A5 0, C2 0, C3 0, C4 0, D 0
- Exportierte thermische Energie (EET) [MJ]: A1-A3 0, A5 0, C2 0, C3 0, C4 0, D 0

## Impact indicators
- Globales Erwärmungspotenzial (GWP) [kg CO_(2)-Äq.]: A1-A3 624, A5 0.161, C2 4.8, C3 0.165, C4 2.672, D -407
- Abbau Potential der stratosphärischen Ozonschicht (ODP) [kg CFC11-Äq.]: A1-A3 1.35e-5, A5 -1.07e-8, C2 1.01e-13, C3 2.42e-13, C4 5.95e-13, D -2.81e-6
- Versauerungspotenzial von Boden und Wasser (AP) [kg SO_(2)-Äq.]: A1-A3 1.43, A5 -0.000661, C2 0.019, C3 0.000251, C4 0.0156, D -2.81e-6
- Eutrophierungspotenzial (EP) [kg PO_(4)^(3)-Äq.]: A1-A3 0.454, A5 -1.67e-5, C2 0.00482, C3 4.08e-5, C4 0.00215, D -0.38
- Bildungspotential für troposphärisches Ozon (POCP) [kg Ethen-Äq.]: A1-A3 0.138, A5 -3.48e-5, C2 -0.00721, C3 1.66e-5, C4 0.00121, D -0.117
- Potenzial für den abiotischen Abbau nicht fossiler Ressourcen (ADPE) [kg Sb-Äq.]: A1-A3 0.00121, A5 -8.23e-8, C2 5.04e-7, C3 1.12e-7, C4 9.89e-7, D -0.00104
- Potenzial für den abiotischen Abbau fossiler Brennstoffe (ADPF) [MJ]: A1-A3 8050, A5 -1.16, C2 64.6, C3 1.6, C4 33.9, D -4720

## Use advice
Gültigkeitsbereich:
Diese Umweltdeklaration behandelt CALOSTAT®, das als hocheffiziente Wärmedämmung verwendet werden kann und von der Evonik Resource Efficiency GmbH hergestellt wird. Da CALOSTAT® Dämmplatten in verschiedenen Abmessungen und Stärken vertrieben werden, ist diese Umweltdeklaration volumenbasiert (bei gegebener Dichte).
Systemgrenze:
Der Typ dieser EPD ist "Wiege bis Werkstor - mit Optionen". Die Ökobilanz berücksichtigt dabei folgende Lebenszyklusphasen:

Herstellung und Bereitstellung der Vorprodukte (Modul A1),
Transport der Vorprodukte zum Werk (Modul A2),
Produktion von CALOSTAT® inkl. Aufbereitung eines Abfallstoffes zum Sekundärrohstoff innerhalb der Produktion, Herstellung der Verpackungen, Bereitstellung der Energie und Produktionsprozesse (Modul A3),
Verbrennung der Verpackung (Modul A5),
Transport zum Recyclingprozess bzw. zur Deponie (Modul C2),
Abluft- und Abfallbehandlung (Modul C3),
Beseitigung der gebrauchten Dämmplatten (Modul C4),
Nachnutzungsphase (Recycling) von gebrauchten Dämmplatten (Modul D).

Die Rohstoffe werden bis zu den Elementarflüssen betrachtet. Es wird der komplette Produktionsprozess betrachtet.

## Data sources
- CALOSTAT®.pdf
- GaBi Database (all versions)
- GaBi database SP34 2017
